a := 300
l := 1000
b := 190
h := 10
d := 60
dl := 1000/d = 16.6667
dl := 16.5
dh := max(dl, h) = 16.5
na := floor(a/dl)
na = 18
areal := na*dl
areal = 297
nb := floor(b/dh)
nb = 11
breal := nb*dh
breal = 181.5
count := ceil(areal*nb/l)
count = 4
total_l := count*l
total_l = 4000
# Быстрый расчет
ceil(a*b/(l*dh)) = 4
